x := 1, 1.2 .. 2
y(x) := x*2^x - 1
x = [1; 1.2; 1.4; 1.6; 1.8; 2]
y(x) = [1; 1.75688; 2.69462; 3.85029; 5.26796; 7]
Lagrange(x, f, z) :=
    n ← last(x)
    sum((product({
        z - x[i] if i ≠ k
        1 otherwise
    }, i = 0 .. n)/product({
        x[k] - x[i] if i ≠ k
        1 otherwise
    }, i = 0 .. n))*f[k], k = 0 .. n)
n := 3
fr(x, f, n) := sum(f[i]/product({
    x[i] - x[j] if i ≠ j
    1 otherwise
}, j = 0 .. n), i = 0 .. n)
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PNewton(x, f, z) :=
    n ← last(x)
    f[0] + sum(product((z - x[k])*fr(x, f, i), k = 0 .. i - 1), i = 1 .. n)
ix := [1; 1.2; 1.4; 1.6; 1.8; 2]
f := [1; 1.75687605; 2.69462215; 3.85029301; 5.26796406; 7]
pn1 := PNewton(ix, f, 1.17) = 1.61781
z1 := Lagrange(ix, f, 1.17) = 1.63264
pn2 := PNewton(ix, f, 1.34) = 2.52869
z2 := Lagrange(ix, f, 1.34) = 2.39223
pn3 := PNewton(ix, f, 1.74) = 5.90555
z3 := Lagrange(ix, f, 1.74) = 4.81221
z11 := y(1.17) = 1.63264
Δ[1] := |z1 - z11| = 1.1263e-6
z11 := y(1.17) = 1.63264
Δ[1] := |pn1 - z11| = 0.0148221
z22 := y(1.34) = 2.39223
Δ[2] := |z2 - z22| = 9.83232e-7
z22 := y(1.34) = 2.39223
z33 := y(1.74) = 4.81221
Δ[3] := |z3 - z33| = 1.35355e-6
Δ[2] := |pn2 - z22| = 0.136459
z33 := y(1.74) = 4.81221
Δ[3] := |pn3 - z33| = 1.09333
